// COMSOL Multiphysics 4.2 (Build: 150) model "elec_plot.mph"
// Outline of the model tree

Geometry
  geom1 "Geometry 1" (2D axisymmetric, length unit m)
    r1: Rectangle "Bottom Electrode" | size = {0.06, 0.00005}
    r2: Rectangle "Epoxy" | pos = {0, 0.00005}; size = {0.08, 0.0015}
    r3: Rectangle "Polyethylene" | pos = {0, 0.00155}; size = {0.1, 0.0025}
    r4: Rectangle "Top Electrode" | pos = {0, 0.00405}; size = {0.075, 0.00005}
    r5: Rectangle "Air1" | pos = {0, 0.0041}; size = {0.075, 0.5}
    r6: Rectangle "Air2" | pos = {0.075, 0.00405}; size = {0.025, 0.50005}
    r7: Rectangle "Air3" | pos = {0, -0.2}; size = {0.06, 0.2}
    r8: Rectangle "Air4" | pos = {0.06, -0.2}; size = {0.02, 0.20005}
    r9: Rectangle "Air5" | pos = {0.08, -0.2}; size = {0.02, 0.20155}
    r10: Rectangle "Air6" | pos = {0.1, -0.2}; size = {0.05, 0.7041}
    fin: Finalize "Form Union"

Materials
  mat1 "Air" on domains 1, 6-10
    def "Basic"
      relpermeability = 1
      relpermittivity = 1
      dynamicviscosity = eta(T[1/K])[Pa*s]
      ratioofspecificheat = 1.4
      electricconductivity = 0[S/m]
      heatcapacity = Cp(T[1/K])[J/(kg*K)]
      density = rho(pA[1/Pa],T[1/K])[kg/m^3]
      thermalconductivity = k(T[1/K])[W/(m*K)]
      soundspeed = cs(T[1/K])[m/s]
      eta: Piecewise | arg = T; extrap = constant; pieces = {200.0, 1600.0, -8.38278E-7+8.35717342E-8*T^1-7.69429583E-11*T^2+4.6437266E-14*T^3-1.06585607E-17*T^4}
      Cp: Piecewise | arg = T; extrap = constant; pieces = {200.0, 1600.0, 1047.63657-0.372589265*T^1+9.45304214E-4*T^2-6.02409443E-7*T^3+1.2858961E-10*T^4}
      rho: Analytic | expr = pA*0.02897/8.314/T; args = {pA, T}; dermethod = manual; argders = {{pA, d(pA*0.02897/8.314/T,pA)}, {T, d(pA*0.02897/8.314/T,T)}}
      k: Piecewise | arg = T; extrap = constant; pieces = {200.0, 1600.0, -0.00227583562+1.15480022E-4*T^1-7.90252856E-8*T^2+4.11702505E-11*T^3-7.43864331E-15*T^4}
      cs: Analytic | expr = sqrt(1.4*287*T); args = T; dermethod = manual; argders = {T, d(sqrt(1.4*287*T),T)}
  mat2 "Aluminum" on domains 2, 5
    def "Basic"
      relpermeability = 1
      heatcapacity = 900[J/(kg*K)]
      thermalconductivity = 160[W/(m*K)]
      electricconductivity = 3.774e7[S/m]
      relpermittivity = 1
      thermalexpansioncoefficient = 23e-6[1/K]
      density = 2700[kg/m^3]
    Enu "Young's modulus and Poisson's ratio"
      youngsmodulus = 70e9[Pa]
      poissonsratio = 0.33
    Murnaghan
      l = -2.5e11[Pa]
      m = -3.3e11[Pa]
      n = -3.5e11[Pa]
      lambLame = 5.1e10[Pa]
      muLame = 2.6e10[Pa]
    Lame "Lamé constants"
      lambLame = 5.1e10[Pa]
      muLame = 2.6e10[Pa]
    NeoHookean
      mu = 2.6e10[Pa]
      lambda = 5.1e10[Pa]
  mat3 "Epoxy Resin" on domains 3
    def "Basic"
      relpermeability = 1
      electricconductivity = 3.030e7[S/m]
      thermalexpansioncoefficient = 23.4e-6[1/K]
      heatcapacity = 900[J/(kg*K)]
      relpermittivity = 3.8
      density = 2700[kg/m^3]
      thermalconductivity = 201[W/(m*K)]
    Enu "Young's modulus and Poisson's ratio"
      youngsmodulus = 69e9[Pa]
      poissonsratio = 0.33
  mat4 "Polyethylene" on domains 4
    def "Basic"
      relpermeability = 1
      electricconductivity = 3.030e7[S/m]
      thermalexpansioncoefficient = 23.4e-6[1/K]
      heatcapacity = 900[J/(kg*K)]
      relpermittivity = 2.3
      density = 2700[kg/m^3]
      thermalconductivity = 201[W/(m*K)]
    Enu "Young's modulus and Poisson's ratio"
      youngsmodulus = 69e9[Pa]
      poissonsratio = 0.33

Physics
  es: Electrostatics on domains 1-10
    dependent variable V
    ccn1: ChargeConservation (default)
    axi1: AxialSymmetry (default)
    zc1: ZeroCharge (default)
    init1: init "Initial Values 1" (default) | V = 0
    gnd1: Ground on boundaries 2, 4, 6, 13, 15, 16, 21, 23, 27, 30, 31
    term1: Terminal on boundaries 10, 12, 18 | TerminalType = Voltage; V0 = 1000

Mesh
  mesh1 "Mesh 1" (physics-controlled)
    size: MeshSizeDefault | hauto = 7

Studies
  std1 "Study 1"
    stat: Stationary | physselection = es

Solver configurations
  sol1 "Solver 1" (study std1)
    v1: Variables "Dependent Variables 1"
    s1: Stationary "Stationary Solver 1"
      dDef: Direct
      fc1: FullyCoupled

Datasets
  dset1: Solution | solution = sol1
  rev1: Revolve2D "Revolution 2D 1" | data = dset1; genpoints = {{0, 0}, {0, 1}}; startangle = -90; revangle = 225

Plots
  pg1: PlotGroup2D "Electric Potential (es)" | data = dset1
    surf1: Surface | expr = V

Exports
  plot1: Plot
  img1: Image2D "2D Image 1"