// COMSOL Multiphysics 4.3.2.164 model "AxialGrading21.mph"
// Outline of the model tree

Variables
  var1 "Variables 1"
    T_Foil = 100[um]

Geometry
  geom1 "Geometry 1" (2D axisymmetric, length unit mm)
    r1: Rectangle "Conductor" | size = {50, 7000}
    r2: Rectangle "Paper_Oil_Insulation" | pos = {50, 750}; size = {100, 5500}
    r3: Rectangle "Transformer_Wall" | pos = {150, 3475}; size = {2000, 50}
    r4: Rectangle "Oil_1" | pos = {150, 750}; size = {2000, 2725}
    r5: Rectangle "Oil_2" | pos = {50, 0}; size = {2100, 750}
    r6: Rectangle "Air_1" | pos = {150, 3525}; size = {2000, 2725}
    r7: Rectangle "Air_2" | pos = {50, 6250}; size = {2100, 750}
    r8: Rectangle "Foil_1" | pos = {52, 1000}; size = {0.1, 5000}
    r9: Rectangle "Foil_2" | pos = {56.8, 1211.3}; size = {0.1, 4577.5}
    r10: Rectangle "Foil_3" | pos = {61.6, 1389.6}; size = {0.1, 4220.8}
    r11: Rectangle "Foil_4" | pos = {66.4, 1542.2}; size = {0.1, 3915.7}
    r12: Rectangle "Foil_5" | pos = {71.2, 1674.2}; size = {0.1, 3651.7}
    r13: Rectangle "Foil_6" | pos = {76, 1789.5}; size = {0.1, 3421}
    r14: Rectangle "Foil_7" | pos = {80.8, 1891.1}; size = {0.1, 3217.8}
    r15: Rectangle "Foil_8" | pos = {85.6, 1981.3}; size = {0.1, 3037.4}
    r16: Rectangle "Foil_9" | pos = {90.4, 2061.9}; size = {0.1, 2876.1}
    r17: Rectangle "Foil_10" | pos = {95.2, 2134.5}; size = {0.1, 2731.1}
    r18: Rectangle "Foil_11" | pos = {100, 2200}; size = {0.1, 2600}
    r19: Rectangle "Foil_12" | pos = {104.2, 2259.5}; size = {0.1, 2480.9}
    r20: Rectangle "Foil_13" | pos = {109.6, 2313.9}; size = {0.1, 2372.3}
    r21: Rectangle "Foil_14" | pos = {114.4, 2363.6}; size = {0.1, 2272.7}
    r22: Rectangle "Foil_15" | pos = {119.2, 2409.4}; size = {0.1, 2181.2}
    r23: Rectangle "Foil_16" | pos = {124.7, 2451.6}; size = {0.1, 2096.8}
    r24: Rectangle "Foil_17" | pos = {128.8, 2490.7}; size = {0.1, 2018.6}
    r25: Rectangle "Foil_18" | pos = {133.6, 2526.9}; size = {0.1, 1946.1}
    r26: Rectangle "Foil_19" | pos = {138.4, 2560.7}; size = {0.1, 1878.6}
    r27: Rectangle "Foil_20" | pos = {143.2, 2592.2}; size = {0.1, 1815.6}
    r28: Rectangle "Foil_21" | pos = {148, 2621.6}; size = {0.1, 1756.8}
    fin: Finalize "Form Union"

Materials
  mat1 "Air" on domains 4, 28
    def "Basic"
      relpermeability = 1
      relpermittivity = 1
      dynamicviscosity = eta(T[1/K])[Pa*s]
      ratioofspecificheat = 1.4
      electricconductivity = 0[S/m]
      heatcapacity = Cp(T[1/K])[J/(kg*K)]
      density = rho(pA[1/Pa],T[1/K])[kg/m^3]
      thermalconductivity = k(T[1/K])[W/(m*K)]
      soundspeed = cs(T[1/K])[m/s]
      eta: Piecewise | arg = T; extrap = constant; pieces = {200.0, 1600.0, -8.38278E-7+8.35717342E-8*T^1-7.69429583E-11*T^2+4.6437266E-14*T^3-1.06585607E-17*T^4}
      Cp: Piecewise | arg = T; extrap = constant; pieces = {200.0, 1600.0, 1047.63657-0.372589265*T^1+9.45304214E-4*T^2-6.02409443E-7*T^3+1.2858961E-10*T^4}
      rho: Analytic | expr = pA*0.02897/8.314/T; args = {pA, T}; dermethod = manual; argders = {{pA, d(pA*0.02897/8.314/T,pA)}, {T, d(pA*0.02897/8.314/T,T)}}
      k: Piecewise | arg = T; extrap = constant; pieces = {200.0, 1600.0, -0.00227583562+1.15480022E-4*T^1-7.90252856E-8*T^2+4.11702505E-11*T^3-7.43864331E-15*T^4}
      cs: Analytic | expr = sqrt(1.4*287*T); args = T; dermethod = manual; argders = {T, d(sqrt(1.4*287*T),T)}
    RefractiveIndex
      n = 1
      ki = 0
  mat2 "Aluminum" on domains 1, 5-25, 27
    def "Basic"
      relpermeability = 1
      heatcapacity = 900[J/(kg*K)]
      thermalconductivity = 160[W/(m*K)]
      electricconductivity = 3.774e7[S/m]
      relpermittivity = 100000000
      thermalexpansioncoefficient = 23e-6[1/K]
      density = 2700[kg/m^3]
    Enu "Young's modulus and Poisson's ratio"
      youngsmodulus = 70e9[Pa]
      poissonsratio = 0.33
    Murnaghan
      l = -2.5e11[Pa]
      m = -3.3e11[Pa]
      n = -3.5e11[Pa]
    Lame "Lamé parameters"
      lambLame = 5.1e10[Pa]
      muLame = 2.6e10[Pa]
  mat3 "Transformer oil" on domains 2, 26
    def "Basic"
      dynamicviscosity = eta(T[1/K])[Pa*s]
      heatcapacity = Cp(T[1/K])[J/(kg*K)]
      density = rho(T[1/K])[kg/m^3]
      thermalconductivity = k(T[1/K])[W/(m*K)]
      relpermittivity = 2.2
      eta: Piecewise
        arg = T
        extrap = constant
        pieces = 
          {243.0, 273.0, 4492.20229-64.7408879*T^1+0.349900959*T^2-8.40477E-4*T^3+7.57041667E-7*T^4}
          {273.0, 373.0, 91.4524999-1.33227058*T^1+0.00777680216*T^2-2.27271368E-5*T^3+3.32419673E-8*T^4-1.94631023E-11*T^5}
      Cp: Piecewise
        arg = T
        extrap = constant
        pieces = 
          {223.0, 293.0, -117056.38+1816.76208*T^1-10.305786*T^2+0.0256691919*T^3-2.36742424E-5*T^4}
          {293.0, 373.0, -13408.1491+123.044152*T^1-0.335401786*T^2+3.125E-4*T^3}
      rho: Piecewise | arg = T; extrap = constant; pieces = {223.0, 373.0, 1055.04607-0.581753034*T^1-6.40531689E-5*T^2}
      k: Piecewise | arg = T; extrap = constant; pieces = {223.0, 373.0, 0.134299084-8.04973822E-5*T^1}
  mat4 "Paper-Oil Insulation" on domains 3
    def "Basic"
      relpermeability = 1
      relpermittivity = 4
      dynamicviscosity = eta(T[1/K])[Pa*s]
      ratioofspecificheat = 1.4
      electricconductivity = 0[S/m]
      heatcapacity = Cp(T[1/K])[J/(kg*K)]
      density = rho(pA[1/Pa],T[1/K])[kg/m^3]
      thermalconductivity = k(T[1/K])[W/(m*K)]
      soundspeed = cs(T[1/K])[m/s]
      eta: Piecewise | arg = T; extrap = constant; pieces = {200.0, 1600.0, -8.38278E-7+8.35717342E-8*T^1-7.69429583E-11*T^2+4.6437266E-14*T^3-1.06585607E-17*T^4}
      Cp: Piecewise | arg = T; extrap = constant; pieces = {200.0, 1600.0, 1047.63657-0.372589265*T^1+9.45304214E-4*T^2-6.02409443E-7*T^3+1.2858961E-10*T^4}
      rho: Analytic | expr = pA*0.02897/8.314/T; args = {pA, T}; dermethod = manual; argders = {{pA, d(pA*0.02897/8.314/T,pA)}, {T, d(pA*0.02897/8.314/T,T)}}
      k: Piecewise | arg = T; extrap = constant; pieces = {200.0, 1600.0, -0.00227583562+1.15480022E-4*T^1-7.90252856E-8*T^2+4.11702505E-11*T^3-7.43864331E-15*T^4}
      cs: Analytic | expr = sqrt(1.4*287*T); args = T; dermethod = manual; argders = {T, d(sqrt(1.4*287*T),T)}
    RefractiveIndex
      n = 1
      ki = 0

Physics
  es: Electrostatics on all domains
    dependent variable V
    ccn1: ChargeConservation (default)
    axi1: AxialSymmetry (default)
    zc1: ZeroCharge (default)
    init1: init "Initial Values 1" (default) | V = 0
    gnd1: Ground on boundaries 5, 10, 91-94, 97, 98, 100, 102-106
    pot1: ElectricPotential "Conductor Potential" on boundaries 2-4, 6, 8, 11-14 | V0 = 275000

Mesh
  mesh1 "Mesh 1" (physics-controlled)
    size: MeshSizeDefault | hauto = 9

Studies
  std1 "Study 1"
    stat: Stationary

Solver configurations
  sol1 "Solver 1" (study std1)
    v1: Variables "Dependent Variables 1"
    s1: Stationary "Stationary Solver 1"
      dDef: Direct
      fc1: FullyCoupled

Datasets
  dset1: Solution | solution = sol1
  rev1: Revolve2D "Revolution 2D" | data = dset1; genpoints = {{0, 0}, {0, 1}}

Plots
  pg1: PlotGroup2D "Electric Potential (es)" | data = dset1
    surf1: Surface (disabled) | expr = V; wireframe = off
    con1: Contour | expr = V
  pg2: PlotGroup3D "Electric Potential (es) 1" | data = rev1
    surf1: Surface | expr = V; wireframe = on