// COMSOL Multiphysics 4.3.2.164 model "DM_No_Grading.mph"
// Outline of the model tree

Parameters
  Conductor_Height = 5000[mm]
  Conductor_Width = 50[mm]
  Foil_Width = .1[mm]
  G_Height = 50[mm]
  G_Width = 100[mm]
  Spacing = 4.8[mm]

Coordinate systems
  sys1: Boundary "Boundary System 1" | mastercoordsystcomp = 2

Geometry
  geom1 "Geometry 1" (2D, length unit mm)
    r1: Rectangle "Conductor_Metal" | size = {Conductor_Width, 100+Conductor_Height/2}
    r2: Rectangle "First_Foil" (disabled)
      pos = {Conductor_Width+2, 0}
      type = solid
      base = corner
      size = {Foil_Width, 5000/2}
    sq1: Square "Connector" (disabled) | pos = {Conductor_Width, 0}; type = solid; base = corner; size = 2
    uni1: Union (disabled) | input = r1, r2, sq1; intbnd = off; edge = all
    r3: Rectangle (disabled)
      pos = {Conductor_Width+2+Spacing, 0}
      type = solid
      base = corner
      size = {Foil_Width, 4577.46/2}
    r6: Rectangle (disabled)
      pos = {Conductor_Width+2+2*Spacing, 0}
      type = solid
      base = corner
      size = {Foil_Width, 4220.78/2}
    r7: Rectangle (disabled)
      pos = {Conductor_Width+2+3*Spacing, 0}
      type = solid
      base = corner
      size = {Foil_Width, 3915.66 /2}
    r8: Rectangle (disabled)
      pos = {Conductor_Width+2+4*Spacing, 0}
      type = solid
      base = corner
      size = {Foil_Width, 3651.69 /2}
    r9: Rectangle (disabled)
      pos = {Conductor_Width+2+5*Spacing, 0}
      type = solid
      base = corner
      size = {Foil_Width, 3421.05/2}
    r10: Rectangle (disabled)
      pos = {Conductor_Width+2+6*Spacing, 0}
      type = solid
      base = corner
      size = {Foil_Width, 3217.82/2}
    r11: Rectangle (disabled)
      pos = {Conductor_Width+2+7*Spacing, 0}
      type = solid
      base = corner
      size = {Foil_Width, 3037.38 /2}
    r12: Rectangle (disabled)
      pos = {Conductor_Width+2+8*Spacing, 0}
      type = solid
      base = corner
      size = {Foil_Width, 2876.11/2}
    r13: Rectangle (disabled)
      pos = {Conductor_Width+2+9*Spacing, 0}
      type = solid
      base = corner
      size = {Foil_Width, 2731.09/2}
    r14: Rectangle (disabled)
      pos = {Conductor_Width+2+10*Spacing, 0}
      type = solid
      base = corner
      size = {Foil_Width, 2600.00/2}
    r15: Rectangle (disabled)
      pos = {Conductor_Width+2+11*Spacing, 0}
      type = solid
      base = corner
      size = {Foil_Width, 2480.92/2}
    r16: Rectangle (disabled)
      pos = {Conductor_Width+2+12*Spacing, 0}
      type = solid
      base = corner
      size = {Foil_Width, 2372.26/2}
    r17: Rectangle (disabled)
      pos = {Conductor_Width+2+13*Spacing, 0}
      type = solid
      base = corner
      size = {Foil_Width, 2272.73/2}
    r18: Rectangle (disabled)
      pos = {Conductor_Width+2+14*Spacing, 0}
      type = solid
      base = corner
      size = {Foil_Width, 2181.21/2}
    r19: Rectangle (disabled)
      pos = {Conductor_Width+2+15*Spacing, 0}
      type = solid
      base = corner
      size = {Foil_Width, 2096.77/2}
    r20: Rectangle (disabled)
      pos = {Conductor_Width+2+16*Spacing, 0}
      type = solid
      base = corner
      size = {Foil_Width, 2018.63/2}
    r21: Rectangle (disabled)
      pos = {Conductor_Width+2+17*Spacing, 0}
      type = solid
      base = corner
      size = {Foil_Width, 1946.11/2}
    r22: Rectangle (disabled)
      pos = {Conductor_Width+2+18*Spacing, 0}
      type = solid
      base = corner
      size = {Foil_Width, 1878.61/2}
    r23: Rectangle (disabled)
      pos = {Conductor_Width+2+19*Spacing, 0}
      type = solid
      base = corner
      size = {Foil_Width, 1815.64/2}
    r24: Rectangle (disabled)
      pos = {Conductor_Width+2+20*Spacing, 0}
      type = solid
      base = corner
      size = {Foil_Width, 1756.76/2}
    r25: Rectangle "Ground" | pos = {150, 0}; type = solid; base = corner; size = {60, 50}
    r26: Rectangle | pos = {148, 0}; type = solid; base = corner; size = {2, 6}
    uni2: Union | input = r24, r25, r26; intbnd = off; edge = all
    r27: Rectangle | pos = {Conductor_Width, 0}; type = solid; base = corner; size = {100, 2600}
    sq2: Square (disabled) | pos = {150, 30+1756.76/2}; rot = 4; type = solid; base = corner; size = 300
    pol1: Polygon | x = 50, 50, 150,150,150; y = 2600, 2600, 2600,950,950
    dif1: Difference | input = r27; input2 = pol1
    pol2: Polygon | x = 50, 300, 300, 210, 210, 150, 150; y = 2600, 2600, 0, 0, 50, 50, 950
    fin: Finalize "Form Union"

Materials
  mat1 "Material 1" (disabled) on all domains
  mat2 "Aluminum" on domains 4, 5
    def "Basic"
      relpermeability = 1
      heatcapacity = 900[J/(kg*K)]
      thermalconductivity = 160[W/(m*K)]
      electricconductivity = 3.774e7[S/m]
      relpermittivity = 1
      thermalexpansioncoefficient = 23e-6[1/K]
      density = 2700[kg/m^3]
    Enu "Young's modulus and Poisson's ratio"
      youngsmodulus = 70e9[Pa]
      poissonsratio = 0.33
    Murnaghan
      l = -2.5e11[Pa]
      m = -3.3e11[Pa]
      n = -3.5e11[Pa]
    Lame "Lamé constants"
      lambLame = 5.1e10[Pa]
      muLame = 2.6e10[Pa]
  mat3 "Copper" on domains 1
    def "Basic"
      relpermeability = 1
      electricconductivity = 5.998e7[S/m]
      thermalexpansioncoefficient = 17e-6[1/K]
      heatcapacity = 385[J/(kg*K)]
      relpermittivity = 1
      density = 8700[kg/m^3]
      thermalconductivity = 400[W/(m*K)]
    Enu "Young's modulus and Poisson's ratio"
      youngsmodulus = 110e9[Pa]
      poissonsratio = 0.35
    linzRes "Linearized resistivity"
      rho0 = 1.72e-8[ohm*m]
      alpha = 0.0039[1/K]
      Tref = 298[K]
  mat4 "Air" on domains 3
    def "Basic"
      relpermeability = 1
      relpermittivity = 1
      dynamicviscosity = eta(T[1/K])[Pa*s]
      ratioofspecificheat = 1.4
      electricconductivity = 0[S/m]
      heatcapacity = Cp(T[1/K])[J/(kg*K)]
      density = rho(pA[1/Pa],T[1/K])[kg/m^3]
      thermalconductivity = k(T[1/K])[W/(m*K)]
      soundspeed = cs(T[1/K])[m/s]
      eta: Piecewise | arg = T; extrap = constant; pieces = {200.0, 1600.0, -8.38278E-7+8.35717342E-8*T^1-7.69429583E-11*T^2+4.6437266E-14*T^3-1.06585607E-17*T^4}
      Cp: Piecewise | arg = T; extrap = constant; pieces = {200.0, 1600.0, 1047.63657-0.372589265*T^1+9.45304214E-4*T^2-6.02409443E-7*T^3+1.2858961E-10*T^4}
      rho: Analytic | expr = pA*0.02897/8.314/T; args = {pA, T}; dermethod = manual; argders = {{pA, d(pA*0.02897/8.314/T,pA)}, {T, d(pA*0.02897/8.314/T,T)}}
      k: Piecewise | arg = T; extrap = constant; pieces = {200.0, 1600.0, -0.00227583562+1.15480022E-4*T^1-7.90252856E-8*T^2+4.11702505E-11*T^3-7.43864331E-15*T^4}
      cs: Analytic | expr = sqrt(1.4*287*T); args = T; dermethod = manual; argders = {T, d(sqrt(1.4*287*T),T)}
    RefractiveIndex
      n = 1
      ki = 0
  mat5 "Polyethylene" on domains 2
    def "Basic"
      thermalexpansioncoefficient = 150e-6[1/K]
      heatcapacity = 1900[J/(kg*K)]
      relpermittivity = 2.3
      density = 930[kg/m^3]
      thermalconductivity = 0.38[W/(m*K)]
    Enu "Young's modulus and Poisson's ratio"
      youngsmodulus = 1e9[Pa]
      poissonsratio = 0.33

Physics
  es: Electrostatics on all domains
    dependent variable V
    ccn1: ChargeConservation (default)
    zc1: ZeroCharge (default)
    init1: init "Initial Values 1" (default)
    gnd1: Ground on boundaries 7, 8, 10-13, 15-18
    pot1: ElectricPotential (disabled) on boundaries 1-5 | V0 = 275000
    term1: Terminal on boundaries 1-5 | TerminalType = Voltage; V0 = 275000

Mesh
  mesh1 "Mesh 1"
    size: MeshSizeDefault | hmin = 25.2; hauto = 6; custom = on
    ftri2: FreeTri "Free Triangular 2" on remaining entities
      size1: Size on domains 1, 3-5 | hauto = 7
      size2: Size on domains 2 | hauto = 2
      dis1: Distribution on boundaries 1, 2, 12-16, 18 | numelem = 50
      dis2: Distribution on no boundaries
        type = predefined
        elemcount = 300
        elemratio = 20
        method = geometric
        reverse = on
      dis3: Distribution on boundaries 2-5, 7, 8, 10-13, 15-17 | numelem = 3
      dis5: Distribution on boundaries 6 | numelem = 300
      dis4: Distribution "Tip_Of_Foils" on no boundaries | numelem = 7

Studies
  std1 "Study 1"
    stat: Stationary

Solver configurations
  sol1 "Solver 1" (study std1)
    v1: Variables "Dependent Variables 1"
    s1: Stationary "Stationary Solver 1"
      dDef: Direct
      fc1: FullyCoupled

Datasets
  dset1: Solution | solution = sol1

Plots
  pg1: PlotGroup2D "Electric Potential (es)" | data = dset1
    surf1: Surface | expr = V
  pg2: PlotGroup2D "2D Plot Group 2" | data = dset1
    surf1: Surface | expr = es.normE