// COMSOL Multiphysics 4.3.2.164 model "NoGrading.mph"
// Outline of the model tree

Parameters
  W_Con = 50[mm]
  L_Con = 6000[mm]
  L_Foil1 = 5000[mm]
  T_Foil = 0.1[mm]
  W_Area = 500[mm]
  L_Paper = 5500[mm]
  W_Paper = 100[mm]
  L_Wall = 50[mm]
  L_Paper_Rect = 1800[mm]

Geometry
  geom1 "Geometry 1" (2D axisymmetric, length unit mm)
    r1: Rectangle "Conductor" | size = {W_Con, L_Con}
    r2: Rectangle "Paper_Insulation_Rectangle_Oil" | pos = {W_Con, (L_Con-L_Paper)/2}; size = {W_Paper, L_Paper/2}
    r3: Rectangle "Transformer_Wall" | pos = {W_Con+W_Paper, (L_Con-L_Wall)/2}; size = {W_Area-(W_Con+W_Paper), L_Wall}
    r4: Rectangle "Oil_1" | pos = {W_Con+W_Paper, (L_Con-L_Paper)/2}; size = {W_Area-(W_Con+W_Paper), (L_Paper-L_Wall)/2}
    r5: Rectangle "Oil_2" | pos = {W_Con, 0}; size = {W_Area-W_Con, (L_Con-L_Paper)/2}
    r6: Rectangle "Air_1"
      pos = {W_Con+W_Paper, (L_Con-L_Wall)/2+L_Wall}
      size = {W_Area-(W_Con+W_Paper), (L_Paper-L_Wall)/2}
    r7: Rectangle "Air_2" | pos = {W_Con, L_Con-((L_Con-L_Paper)/2)}; size = {W_Area-W_Con, (L_Con-L_Paper)/2}
    pol1: Polygon "Area_Subtract_Oil"
      x = W_Con,W_Con,(W_Con+W_Paper),(W_Con+W_Paper)
      y = (L_Con-L_Paper)/2, L_Con-((L_Con-L_Paper)/2),L_Con-(L_Con-L_Paper_Rect)/2,(L_Con-L_Paper_Rect)/2
    dif1: Difference "Sub_Area_Oil" | input = r2; input2 = pol1
    pol2: Polygon "Paper_Insulation_Angled"
      x = W_Con,W_Con,(W_Con+W_Paper),(W_Con+W_Paper)
      y = (L_Con-L_Paper)/2, L_Con-((L_Con-L_Paper)/2),L_Con-(L_Con-L_Paper_Rect)/2,(L_Con-L_Paper_Rect)/2
    pol3: Polygon "Area_Subtract_Air"
      x = W_Con,W_Con,(W_Con+W_Paper),(W_Con+W_Paper)
      y = (L_Con-L_Paper)/2, L_Con-((L_Con-L_Paper)/2),L_Con-(L_Con-L_Paper_Rect)/2,(L_Con-L_Paper_Rect)/2
    r8: Rectangle "Paper_Insulation_Rectangle_Air"
      pos = {W_Con, ((L_Con-L_Paper)/2)+(L_Paper/2)}
      size = {W_Paper, L_Paper/2}
    dif2: Difference "Sub_Area_Air" | input = r8; input2 = pol3
    fin: Finalize "Form Union"

Materials
  mat1 "Air" on domains 5, 6, 9
    def "Basic"
      relpermeability = 1
      relpermittivity = 1
      dynamicviscosity = eta(T[1/K])[Pa*s]
      ratioofspecificheat = 1.4
      electricconductivity = 0[S/m]
      heatcapacity = Cp(T[1/K])[J/(kg*K)]
      density = rho(pA[1/Pa],T[1/K])[kg/m^3]
      thermalconductivity = k(T[1/K])[W/(m*K)]
      soundspeed = cs(T[1/K])[m/s]
      eta: Piecewise | arg = T; extrap = constant; pieces = {200.0, 1600.0, -8.38278E-7+8.35717342E-8*T^1-7.69429583E-11*T^2+4.6437266E-14*T^3-1.06585607E-17*T^4}
      Cp: Piecewise | arg = T; extrap = constant; pieces = {200.0, 1600.0, 1047.63657-0.372589265*T^1+9.45304214E-4*T^2-6.02409443E-7*T^3+1.2858961E-10*T^4}
      rho: Analytic | expr = pA*0.02897/8.314/T; args = {pA, T}; dermethod = manual; argders = {{pA, d(pA*0.02897/8.314/T,pA)}, {T, d(pA*0.02897/8.314/T,T)}}
      k: Piecewise | arg = T; extrap = constant; pieces = {200.0, 1600.0, -0.00227583562+1.15480022E-4*T^1-7.90252856E-8*T^2+4.11702505E-11*T^3-7.43864331E-15*T^4}
      cs: Analytic | expr = sqrt(1.4*287*T); args = T; dermethod = manual; argders = {T, d(sqrt(1.4*287*T),T)}
    RefractiveIndex
      n = 1
      ki = 0
  mat2 "Aluminum" on domains 1, 8
    def "Basic"
      relpermeability = 1
      heatcapacity = 900[J/(kg*K)]
      thermalconductivity = 160[W/(m*K)]
      electricconductivity = 3.774e7[S/m]
      relpermittivity = 100000000
      thermalexpansioncoefficient = 23e-6[1/K]
      density = 2700[kg/m^3]
    Enu "Young's modulus and Poisson's ratio"
      youngsmodulus = 70e9[Pa]
      poissonsratio = 0.33
    Murnaghan
      l = -2.5e11[Pa]
      m = -3.3e11[Pa]
      n = -3.5e11[Pa]
    Lame "Lamé parameters"
      lambLame = 5.1e10[Pa]
      muLame = 2.6e10[Pa]
  mat3 "Transformer oil" on domains 2, 4, 7
    def "Basic"
      dynamicviscosity = eta(T[1/K])[Pa*s]
      heatcapacity = Cp(T[1/K])[J/(kg*K)]
      density = rho(T[1/K])[kg/m^3]
      thermalconductivity = k(T[1/K])[W/(m*K)]
      relpermittivity = 2.2
      eta: Piecewise
        arg = T
        extrap = constant
        pieces = 
          {243.0, 273.0, 4492.20229-64.7408879*T^1+0.349900959*T^2-8.40477E-4*T^3+7.57041667E-7*T^4}
          {273.0, 373.0, 91.4524999-1.33227058*T^1+0.00777680216*T^2-2.27271368E-5*T^3+3.32419673E-8*T^4-1.94631023E-11*T^5}
      Cp: Piecewise
        arg = T
        extrap = constant
        pieces = 
          {223.0, 293.0, -117056.38+1816.76208*T^1-10.305786*T^2+0.0256691919*T^3-2.36742424E-5*T^4}
          {293.0, 373.0, -13408.1491+123.044152*T^1-0.335401786*T^2+3.125E-4*T^3}
      rho: Piecewise | arg = T; extrap = constant; pieces = {223.0, 373.0, 1055.04607-0.581753034*T^1-6.40531689E-5*T^2}
      k: Piecewise | arg = T; extrap = constant; pieces = {223.0, 373.0, 0.134299084-8.04973822E-5*T^1}
  mat4 "Paper-Oil Insulation" on domains 3
    def "Basic"
      relpermeability = 1
      relpermittivity = 4
      dynamicviscosity = eta(T[1/K])[Pa*s]
      ratioofspecificheat = 1.4
      electricconductivity = 0[S/m]
      heatcapacity = Cp(T[1/K])[J/(kg*K)]
      density = rho(pA[1/Pa],T[1/K])[kg/m^3]
      thermalconductivity = k(T[1/K])[W/(m*K)]
      soundspeed = cs(T[1/K])[m/s]
      eta: Piecewise | arg = T; extrap = constant; pieces = {200.0, 1600.0, -8.38278E-7+8.35717342E-8*T^1-7.69429583E-11*T^2+4.6437266E-14*T^3-1.06585607E-17*T^4}
      Cp: Piecewise | arg = T; extrap = constant; pieces = {200.0, 1600.0, 1047.63657-0.372589265*T^1+9.45304214E-4*T^2-6.02409443E-7*T^3+1.2858961E-10*T^4}
      rho: Analytic | expr = pA*0.02897/8.314/T; args = {pA, T}; dermethod = manual; argders = {{pA, d(pA*0.02897/8.314/T,pA)}, {T, d(pA*0.02897/8.314/T,T)}}
      k: Piecewise | arg = T; extrap = constant; pieces = {200.0, 1600.0, -0.00227583562+1.15480022E-4*T^1-7.90252856E-8*T^2+4.11702505E-11*T^3-7.43864331E-15*T^4}
      cs: Analytic | expr = sqrt(1.4*287*T); args = T; dermethod = manual; argders = {T, d(sqrt(1.4*287*T),T)}
    RefractiveIndex
      n = 1
      ki = 0

Physics
  es: Electrostatics on all domains
    dependent variable V
    ccn1: ChargeConservation (default)
    axi1: AxialSymmetry (default)
    zc1: ZeroCharge (default)
    init1: init "Initial Values 1" (default) | V = 275000
    gnd1: Ground on boundaries 16, 17, 19, 22-26
    pot1: ElectricPotential "Conductor Potential" on boundaries 2-4, 6, 9 | V0 = 275000

Mesh
  mesh1 "Mesh 1" (physics-controlled)
    size: MeshSizeDefault | hauto = 1

Studies
  std1 "Study 1"
    stat: Stationary

Solver configurations
  sol1 "Solver 1" (study std1)
    v1: Variables "Dependent Variables 1"
    s1: Stationary "Stationary Solver 1"
      dDef: Direct
      fc1: FullyCoupled

Datasets
  dset1: Solution | solution = sol1
  rev1: Revolve2D "Revolution 2D" | data = dset1; genpoints = {{0, 0}, {0, 1}}
  rev2: Revolve2D "Revolution 2D 1"
    data = dset1
    genpoints = {{0, 0}, {0, 1}}
    spacevars = {rev1x, rev1y, rev1z}
    anglevar = rev1phi

Plots
  pg1: PlotGroup2D "Electric Potential (es)" | data = dset1
    surf1: Surface | expr = V
  pg2: PlotGroup3D "Electric Potential (es) 1" | data = rev2
    surf1: Surface | expr = V
  pg3: PlotGroup2D "2D Plot Group 3" | data = dset1
    surf1: Surface | expr = es.normE