// COMSOL Multiphysics 4.3.2.164 model "NoGradingShort.mph"
// Outline of the model tree

Geometry
  geom1 "No Foils" (2D axisymmetric, length unit mm)
    r1: Rectangle "Conductor" | size = {50, 3200}
    r2: Rectangle "PaperOilInsulation" | pos = {50, 0}; size = {100, 2750}
    r3: Rectangle "Flange" | pos = {150, 0}; size = {500, 50}
    r4: Rectangle "Air_1" | pos = {150, 50}; size = {500, 2700}
    r5: Rectangle "Air_2" | pos = {50, 2750}; size = {600, 450}
    fin: Finalize "Form Union"

Materials
  mat1 "Air" on domains 3, 5
    def "Basic"
      relpermeability = 1
      relpermittivity = 1
      dynamicviscosity = eta(T[1/K])[Pa*s]
      ratioofspecificheat = 1.4
      electricconductivity = 0[S/m]
      heatcapacity = Cp(T[1/K])[J/(kg*K)]
      density = rho(pA[1/Pa],T[1/K])[kg/m^3]
      thermalconductivity = k(T[1/K])[W/(m*K)]
      soundspeed = cs(T[1/K])[m/s]
      eta: Piecewise | arg = T; extrap = constant; pieces = {200.0, 1600.0, -8.38278E-7+8.35717342E-8*T^1-7.69429583E-11*T^2+4.6437266E-14*T^3-1.06585607E-17*T^4}
      Cp: Piecewise | arg = T; extrap = constant; pieces = {200.0, 1600.0, 1047.63657-0.372589265*T^1+9.45304214E-4*T^2-6.02409443E-7*T^3+1.2858961E-10*T^4}
      rho: Analytic | expr = pA*0.02897/8.314/T; args = {pA, T}; dermethod = manual; argders = {{pA, d(pA*0.02897/8.314/T,pA)}, {T, d(pA*0.02897/8.314/T,T)}}
      k: Piecewise | arg = T; extrap = constant; pieces = {200.0, 1600.0, -0.00227583562+1.15480022E-4*T^1-7.90252856E-8*T^2+4.11702505E-11*T^3-7.43864331E-15*T^4}
      cs: Analytic | expr = sqrt(1.4*287*T); args = T; dermethod = manual; argders = {T, d(sqrt(1.4*287*T),T)}
    RefractiveIndex
      n = 1
      ki = 0
  mat2 "Aluminum" on domains 1, 4
    def "Basic"
      relpermeability = 1
      heatcapacity = 900[J/(kg*K)]
      thermalconductivity = 160[W/(m*K)]
      electricconductivity = 3.774e7[S/m]
      relpermittivity = 100000000
      thermalexpansioncoefficient = 23e-6[1/K]
      density = 2700[kg/m^3]
    Enu "Young's modulus and Poisson's ratio"
      youngsmodulus = 70e9[Pa]
      poissonsratio = 0.33
    Murnaghan
      l = -2.5e11[Pa]
      m = -3.3e11[Pa]
      n = -3.5e11[Pa]
    Lame "Lamé parameters"
      lambLame = 5.1e10[Pa]
      muLame = 2.6e10[Pa]
  mat3 "Material 3" on domains 2
    def "Basic"
      relpermittivity = 4

Physics
  es: Electrostatics on all domains
    dependent variable V
    ccn1: ChargeConservation (default)
    axi1: AxialSymmetry (default)
    zc1: ZeroCharge (default)
    init1: init "Initial Values 1" (default)
    gnd1: Ground on boundaries 9, 10, 12, 14-16
    pot1: ElectricPotential on boundaries 2-4, 6 | V0 = 275000

Mesh
  mesh1 "Mesh 1" (physics-controlled)
    size: MeshSizeDefault | hauto = 1

Studies
  std1 "Study 1"
    stat: Stationary

Solver configurations
  sol1 "Solver 1" (study std1)
    v1: Variables "Dependent Variables 1"
    s1: Stationary "Stationary Solver 1"
      dDef: Direct
      fc1: FullyCoupled

Datasets
  dset1: Solution | solution = sol1
  rev1: Revolve2D "Revolution 2D" | data = dset1; genpoints = {{0, 0}, {0, 1}}
  cln1: CutLine2D "mid_flange" | data = dset1; genpoints = {{0, 25}, {650, 25}}
  cln2: CutLine2D "500mm" | data = dset1; genpoints = {{0, 500}, {650, 500}}
  cln3: CutLine2D "1000mm" | data = dset1; genpoints = {{0, 1000}, {650, 1000}}
  cln4: CutLine2D "1500mm" | data = dset1; genpoints = {{0, 1500}, {650, 1500}}
  cln5: CutLine2D "2000mm" | data = dset1; genpoints = {{0, 2000}, {650, 2000}}
  cln6: CutLine2D "2500mm" | data = dset1; genpoints = {{0, 2500}, {650, 2500}}
  cln7: CutLine2D "3000mm" | data = dset1; genpoints = {{0, 3000}, {650, 3000}}
  cln8: CutLine2D "49mm" | data = dset1; genpoints = {{0, 49}, {650, 49}}
  cln9: CutLine2D "50mm" | data = dset1; genpoints = {{0, 50}, {650, 50}}
  cln10: CutLine2D "51mm" | data = dset1; genpoints = {{0, 51}, {650, 51}}
  cln11: CutLine2D "55mm" | data = dset1; genpoints = {{0, 55}, {650, 55}}

Plots
  pg1: PlotGroup2D "E Field Norm" | data = dset1
    surf4: Surface "Norm E Field" | expr = es.normE
  pg7: PlotGroup2D "E Field R" | data = dset1
    surf1: Surface | expr = es.Er
  pg8: PlotGroup2D "E Field Z" | data = dset1
    surf1: Surface | expr = es.Ez
  pg3: PlotGroup1D "Electric Field Norm" | data = cln1; title = Normal Electric Field in Different Cut Planes
    lngr1: LineGraph | data = cln1; expr = es.normE; legends = 25mm - Mid Flange
    lngr8: LineGraph | data = cln9; expr = es.normE; legends = 50mm - End of Flange
    lngr2: LineGraph | data = cln2; expr = es.normE; legends = 500mm
    lngr3: LineGraph | data = cln3; expr = es.normE; legends = 1000mm
    lngr4: LineGraph | data = cln4; expr = es.normE; legends = 1500mm
    lngr5: LineGraph | data = cln5; expr = es.normE; legends = 2000mm
    lngr6: LineGraph (disabled) | data = cln6; expr = es.normE; legends = 2500mm
    lngr7: LineGraph | data = cln7; expr = es.normE; legends = 3000mm - Outside Bushing
  pg4: PlotGroup1D "Electric Field Axial"
    data = dset1
    title = Electric Field - Axial Component
    xlabel = Arc length
    ylabel = Electric field, z component (V/m)
    lngr1: LineGraph | data = cln1; expr = es.Ez
    lngr2: LineGraph | data = cln2; expr = es.Ez
    lngr3: LineGraph | data = cln3; expr = es.Ez
    lngr4: LineGraph | data = cln4; expr = es.Ez
    lngr5: LineGraph | data = cln5; expr = es.Ez
    lngr6: LineGraph | data = cln6; expr = es.Ez
    lngr7: LineGraph | data = cln7; expr = es.Ez
  pg5: PlotGroup1D "Electric Field Radial"
    data = dset1
    xlabel = Arc length
    ylabel = Electric field, r component (V/m)
    manualgrid = off
    lngr1: LineGraph | data = cln1; expr = es.Er
    lngr2: LineGraph | data = cln2; expr = es.Er
    lngr3: LineGraph | data = cln3; expr = es.Er
    lngr4: LineGraph | data = cln3; expr = es.Er
    lngr5: LineGraph | data = cln5; expr = es.Er
    lngr6: LineGraph | data = cln6; expr = es.Er
    lngr7: LineGraph | data = cln7; expr = es.Er
  pg6: PlotGroup1D "Electric Field Norm Focused" | data = dset1
    lngr1: LineGraph | data = cln1; expr = es.normE
    lngr2: LineGraph | data = cln8; expr = es.normE
    lngr3: LineGraph | data = cln9; expr = es.normE
    lngr4: LineGraph | data = cln10; expr = es.normE
    lngr5: LineGraph | data = cln11; expr = es.normE
  pg9: PlotGroup2D "Voltage Distribution" | data = dset1
    surf1: Surface | expr = V